# OpenSim document version 40000
ExternalLoads:
  datafile: /Users/xabieririzar/uni-projects/Harvard/assistive-arm/moco/forces/sit_stand0002_filtered.mot
  ExternalForce ground_force_r_v: applied_to_body=ground force_expressed_in_body=ground point_expressed_in_body=ground
      force_identifier=ground_force_r_v point_identifier=ground_force_r_p
  ExternalForce ground_force_l_v: applied_to_body=ground force_expressed_in_body=ground point_expressed_in_body=ground
      force_identifier=ground_force_l_v point_identifier=ground_force_l_p
  ExternalForce pelvis_force_v: applied_to_body=pelvis force_expressed_in_body=pelvis point_expressed_in_body=pelvis
      force_identifier=pelvis_force_v point_identifier=pelvis_force_p
